*Heading
** Job name: PSE Model name: Model-1
** Generated by: Abaqus/CAE 2022
*Preprint, echo=NO, model=NO, history=NO, contact=NO
**
*PARAMETER
E=210e9
nu=0.3

** PARTS
**
*Part, name=Part-1
*Node
      1,  0.200000003,  0.200000003,           5.
      2,  0.200000003,  0.100000001,           5.
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*Element, type=C3D20R
  1,  154,  155,  158,  157,    1,    2,    5,    4,  463,  462,  461,  460,  464,  465,  466,
      467,  469,  468,  470,  471
  2,  155,  156,  159,  158,    2,    3,    6,    5,  474,  473,  472,  462,  475,  476,  477,
      465,  468,  478,  479,  470
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*Nset, nset=Set-1, generate
    1,  1521,     1
*Elset, elset=Set-1, generate
   1,  200,    1
** Section: Section-1
*Solid Section, elset=Set-1, material=Material-1
,
*End Part
**
**
** ASSEMBLY
**
*Assembly, name=Assembly
**
*Instance, name=Part-1-1, part=Part-1
*End Instance
**
*Nset, nset=Set-1, instance=Part-1-1
 154,
*Nset, nset=_PickedSet6, internal, instance=Part-1-1
  151,  152,  153,  304,  305,  306
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*Elset, elset=_PickedSet6, internal, instance=Part-1-1
  99, 100, 199, 200
*Elset, elset=__PickedSurf5_S6, internal, instance=Part-1-1, generate
   1,  199,    2
*Surface, type=ELEMENT, name=_PickedSurf5, internal
__PickedSurf5_S6, S6
*End Assembly
**
** MATERIALS
**
*Material, name=Material-1
*Density
7850.,
*Elastic
<E>, <nu>
*Plastic
 2.4e+08,0.
**
** BOUNDARY CONDITIONS
**
** Name: BC-1 Type: Displacement/Rotation
*Boundary
_PickedSet6, 1, 1
_PickedSet6, 2, 2
_PickedSet6, 3, 3
_PickedSet6, 4, 4
_PickedSet6, 5, 5
_PickedSet6, 6, 6
** ----------------------------------------------------------------
**
** STEP: Step-1
**
*Step, name=Step-1, nlgeom=NO, inc=1000
*Static
0.1, 1., 1e-05, 1.
**
** LOADS
**
** Name: Load-1   Type: Pressure
*Dsload
_PickedSurf5, P, 50000.
**
** OUTPUT REQUESTS
**
*Restart, write, frequency=0
**
** FIELD OUTPUT: F-Output-1
**
*Output, field, variable=PRESELECT
**
** HISTORY OUTPUT: H-Output-2
**
*Output, history
*Node Output, nset=Set-1
RF2, U1, U2, U3, UR1, UR2, UR3
**
** HISTORY OUTPUT: H-Output-1
**
*Output, history, variable=PRESELECT
*End Step
