*Heading
** Job name: Adaptivepress-iter1 Model name: Model-1
** Generated by: Abaqus/CAE 2022
*Preprint, echo=NO, model=NO, history=NO, contact=NO
**
** PARTS
**
*Part, name=layer
*Node
      1,           0., 0.0700000003, 0.00200000009
      2,           0., -0.0700000003, 0.00200000009
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*Element, type=C3D10
   1,  2690,   702,  2149,   701,  2947,  2946,  2945,  2949,  2948,  2950
   2,  2690,   702,  2194,  2149,  2947,  2952,  2951,  2945,  2946,  2953
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*Nset, nset=Set-1, generate
     1,  17057,      1
*Elset, elset=Set-1, generate
    1,  8480,     1
*Nset, nset="contact surface"
     1,     2,     3,     7,     8,     9
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*Elset, elset="contact surface"
   87,   94,   98,  207,  209,  338
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** Section: elastomer
*Solid Section, elset=Set-1, material=elastomer
,
*End Part
**
*Part, name=plate
*Node
      1,           0., 0.0375000015, 0.00200000009
      2,           0., 0.0384999998, 0.00200000009
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*Element, type=C3D8R
  1,   19,   20,   26,   25,    1,    2,    8,    7
  2,   20,   21,   27,   26,    2,    3,    9,    8
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*Nset, nset=Set-1, generate
    1,  1098,     1
*Elset, elset=Set-1, generate
   1,  600,    1
*Nset, nset=contact_surface, generate
    6,  1098,     6
*Elset, elset=contact_surface, generate
   5,  600,    5
*Nset, nset=all_nodes, generate
    1,  1098,     1
*Nset, nset=one_node
 546,
** Section: steel
*Solid Section, elset=Set-1, material=steel
,
*End Part
**
**
** ASSEMBLY
**
*Assembly, name=Assembly
**
*Instance, name=plate-1, part=plate
*End Instance
**
*Instance, name=layer-1, part=layer
        0.03,       0.1125,           0.
*End Instance
**
*Nset, nset=Set-2, instance=layer-1
     4,     5,     6,   444,   445,   446
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*Elset, elset=Set-2, instance=layer-1
   37,  163,  175,  180,  182,  185
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*Nset, nset=Set-3, instance=plate-1, generate
    6,  1098,     6
*Elset, elset=Set-3, instance=plate-1, generate
   5,  600,    5
*Nset, nset=Set-4, instance=plate-1, generate
    6,  1098,     6
*Elset, elset=Set-4, instance=plate-1, generate
   5,  600,    5
*Nset, nset=Set-5, instance=plate-1, generate
    6,  1098,     6
*Elset, elset=Set-5, instance=plate-1, generate
   5,  600,    5
*Nset, nset=Set-6, instance=plate-1, generate
    6,  1098,     6
*Elset, elset=Set-6, instance=plate-1, generate
   5,  600,    5
*Nset, nset=Set-7, instance=plate-1, generate
    6,  1098,     6
*Elset, elset=Set-7, instance=plate-1, generate
   5,  600,    5
*Nset, nset=Set-8, instance=plate-1, generate
    6,  1098,     6
*Elset, elset=Set-8, instance=plate-1, generate
   5,  600,    5
*Nset, nset=Set-9, instance=plate-1, generate
    6,  1098,     6
*Elset, elset=Set-9, instance=plate-1, generate
   5,  600,    5
*Nset, nset=Set-10, instance=layer-1
     4,     5,     6,   444,   445,   446
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*Elset, elset=Set-10, instance=layer-1
   37,  163,  175,  180,  182,  185
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*Nset, nset=Set-11, instance=plate-1, generate
    6,  1098,     6
*Elset, elset=Set-11, instance=plate-1, generate
   5,  600,    5
*Nset, nset=Set-12, instance=plate-1, generate
    6,  1098,     6
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*Nset, nset=m_Set-1, instance=layer-1
 2,
*Nset, nset=_PickedSet34, internal, instance=layer-1, generate
     1,  17057,      1
*Elset, elset=_PickedSet34, internal, instance=layer-1, generate
    1,  8480,     1
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*Surface, type=NODE, name=m_Set-1_CNS_, internal
m_Set-1, 1.
*Surface, type=NODE, name=plate-1_all_nodes_CNS_, internal
plate-1.all_nodes, 1.
** Constraint: Constraint-1
*Tie, name=Constraint-1, adjust=yes
plate-1_all_nodes_CNS_, m_Set-1_CNS_
*Elset, elset=__interaction_general_gcs0_8_S4, internal, instance=layer-1
   87,   94,   98,  497,  629,  844
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*Elset, elset=__interaction_general_gcs0_8_S3, internal, instance=layer-1
  207,  338,  386,  433,  525,  679
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*Elset, elset=__interaction_general_gcs0_8_S1, internal, instance=layer-1
  209,  811, 1023, 1971, 2082, 3114
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*Elset, elset=__interaction_general_gcs0_8_S2, internal, instance=layer-1
 3451, 3660, 3741, 4386, 4463, 4668
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*Surface, type=ELEMENT, name=_interaction_general_gcs0_8, internal
__interaction_general_gcs0_8_S4, S4
__interaction_general_gcs0_8_S3, S3
__interaction_general_gcs0_8_S2, S2
__interaction_general_gcs0_8_S1, S1
*Elset, elset=__interaction_general_gcs0_9_S3, internal, instance=layer-1
   37,  163,  175,  180,  182,  185
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*Elset, elset=__interaction_general_gcs0_9_S4, internal, instance=layer-1
  380,  483,  965,  982, 1304, 1801
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*Elset, elset=__interaction_general_gcs0_9_S1, internal, instance=layer-1
  819, 1040, 1484, 1812, 1842, 1854
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*Elset, elset=__interaction_general_gcs0_9_S2, internal, instance=layer-1
  876, 1295, 1530, 1791, 1820, 1855
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*Surface, type=ELEMENT, name=_interaction_general_gcs0_9, internal
__interaction_general_gcs0_9_S3, S3
__interaction_general_gcs0_9_S4, S4
__interaction_general_gcs0_9_S2, S2
__interaction_general_gcs0_9_S1, S1
*End Assembly
**
** MATERIALS
**
*Material, name=elastomer
*Density
1175.,
*Hyperelastic, neo hooke
 1.2e+06,0.
*Material, name=steel
*Density
7850.,
*Elastic
 2.1e+11, 0.3
**
** INTERACTION PROPERTIES
**
*Surface Interaction, name=frict
1.,
*Friction, slip tolerance=0.005
 0.3,
**
** BOUNDARY CONDITIONS
**
** Name: fix all nodes Type: Symmetry/Antisymmetry/Encastre
*Boundary
plate-1.all_nodes, XSYMM
** Name: fix inner layer Type: Symmetry/Antisymmetry/Encastre
*Boundary
Set-10, ENCASTRE
**
** INTERACTIONS
**
** Interaction: interaction_general
*Contact
*Contact Inclusions, ALL EXTERIOR
*Contact Property Assignment
 ,  , frict
*Surface Property Assignment, property=GEOMETRIC CORRECTION
_interaction_general_gcs0_8, Circumferential, 0.03, 0.1125, 0.,  0.03, 0.1125, 1.
_interaction_general_gcs0_9, Circumferential, 0.03, 0.1125, 0.,  0.03, 0.1125, 1.
** ----------------------------------------------------------------
**
** STEP: step1000
**
*Step, name=step1000, nlgeom=YES, inc=10
*Static
0.01, 0.1, 1e-06, 0.01
**
** BOUNDARY CONDITIONS
**
** Name: step1000 Type: Displacement/Rotation
*Boundary
Set-11, 1, 1
Set-11, 2, 2, 0.000273
Set-11, 3, 3
Set-11, 4, 4
Set-11, 5, 5
Set-11, 6, 6
**
** OUTPUT REQUESTS
**
*Restart, write, frequency=0
**
** FIELD OUTPUT: F-Output-1
**
*Output, field
*Node Output
CF, RF, U
*Element Output, directions=YES
LE, PE, PEEQ, PEMAG, S
*Contact Output
CDISP, CFORCE, CSTRESS
**
** FIELD OUTPUT:  from REMESHING RULE: RemeshingRule-1
**
*Output, field, frequency=99999
*Element Output, elset=_PickedSet34, directions=YES
ENDENERI, ENDEN, ELEN, EVOL
**
** HISTORY OUTPUT: H-Output-4
**
*Output, history
*Contact Output
CAREA, CFT1, CFT2, CFT3, CFTM
**
** HISTORY OUTPUT: H-Output-3
**
*Contact Output, nset=layer-1."contact surface"
CAREA, CFT1, CFT2, CFT3, CFTM
**
** HISTORY OUTPUT: H-Output-1
**
*Contact Output, nset=plate-1.contact_surface
CAREA, CFT1, CFT2, CFT3, CFTM
**
** HISTORY OUTPUT: H-Output-2
**
*Node Output, nset=plate-1.one_node
U2,
*End Step
** ----------------------------------------------------------------
**
** STEP: step1250
**
*Step, name=step1250, nlgeom=YES, inc=10
*Static
0.01, 0.1, 1e-06, 0.01
**
** BOUNDARY CONDITIONS
**
** Name: fix all nodes Type: Symmetry/Antisymmetry/Encastre
*Boundary, op=NEW
plate-1.all_nodes, XSYMM
** Name: fix inner layer Type: Symmetry/Antisymmetry/Encastre
*Boundary, op=NEW
Set-10, ENCASTRE
** Name: step1000 Type: Displacement/Rotation
*Boundary, op=NEW
** Name: step1250 Type: Displacement/Rotation
*Boundary, op=NEW
Set-12, 1, 1
Set-12, 2, 2, 0.000308
Set-12, 3, 3
Set-12, 4, 4
Set-12, 5, 5
Set-12, 6, 6
**
** OUTPUT REQUESTS
**
*Restart, write, frequency=0
**
** FIELD OUTPUT: F-Output-1
**
*Output, field
*Node Output
CF, RF, U
*Element Output, directions=YES
LE, PE, PEEQ, PEMAG, S
*Contact Output
CDISP, CFORCE, CSTRESS
**
** HISTORY OUTPUT: H-Output-4
**
*Output, history
*Contact Output
CAREA, CFT1, CFT2, CFT3, CFTM
**
** HISTORY OUTPUT: H-Output-3
**
*Contact Output, nset=layer-1."contact surface"
CAREA, CFT1, CFT2, CFT3, CFTM
**
** HISTORY OUTPUT: H-Output-1
**
*Contact Output, nset=plate-1.contact_surface
CAREA, CFT1, CFT2, CFT3, CFTM
**
** HISTORY OUTPUT: H-Output-2
**
*Node Output, nset=plate-1.one_node
U2,
*End Step
** ----------------------------------------------------------------
**
** STEP: step1500
**
*Step, name=step1500, nlgeom=YES, inc=10
*Static
0.01, 0.1, 1e-06, 0.01
**
** BOUNDARY CONDITIONS
**
** Name: fix all nodes Type: Symmetry/Antisymmetry/Encastre
*Boundary, op=NEW
plate-1.all_nodes, XSYMM
** Name: fix inner layer Type: Symmetry/Antisymmetry/Encastre
*Boundary, op=NEW
Set-10, ENCASTRE
** Name: step1250 Type: Displacement/Rotation
*Boundary, op=NEW
** Name: step1500 Type: Displacement/Rotation
*Boundary, op=NEW
Set-5, 1, 1
Set-5, 2, 2, 0.000343
Set-5, 3, 3
Set-5, 4, 4
Set-5, 5, 5
Set-5, 6, 6
**
** OUTPUT REQUESTS
**
*Restart, write, frequency=0
**
** FIELD OUTPUT: F-Output-1
**
*Output, field
*Node Output
CF, RF, U
*Element Output, directions=YES
LE, PE, PEEQ, PEMAG, S
*Contact Output
CDISP, CFORCE, CSTRESS
**
** HISTORY OUTPUT: H-Output-4
**
*Output, history
*Contact Output
CAREA, CFT1, CFT2, CFT3, CFTM
**
** HISTORY OUTPUT: H-Output-3
**
*Contact Output, nset=layer-1."contact surface"
CAREA, CFT1, CFT2, CFT3, CFTM
**
** HISTORY OUTPUT: H-Output-1
**
*Contact Output, nset=plate-1.contact_surface
CAREA, CFT1, CFT2, CFT3, CFTM
**
** HISTORY OUTPUT: H-Output-2
**
*Node Output, nset=plate-1.one_node
U2,
*End Step
** ----------------------------------------------------------------
**
** STEP: step1750
**
*Step, name=step1750, nlgeom=YES, inc=10
*Static
0.01, 0.1, 1e-06, 0.01
**
** BOUNDARY CONDITIONS
**
** Name: fix all nodes Type: Symmetry/Antisymmetry/Encastre
*Boundary, op=NEW
plate-1.all_nodes, XSYMM
** Name: fix inner layer Type: Symmetry/Antisymmetry/Encastre
*Boundary, op=NEW
Set-10, ENCASTRE
** Name: step1500 Type: Displacement/Rotation
*Boundary, op=NEW
** Name: step1750 Type: Displacement/Rotation
*Boundary, op=NEW
Set-6, 1, 1
Set-6, 2, 2, 0.000392
Set-6, 3, 3
Set-6, 4, 4
Set-6, 5, 5
Set-6, 6, 6
**
** OUTPUT REQUESTS
**
*Restart, write, frequency=0
**
** FIELD OUTPUT: F-Output-1
**
*Output, field
*Node Output
CF, RF, U
*Element Output, directions=YES
LE, PE, PEEQ, PEMAG, S
*Contact Output
CDISP, CFORCE, CSTRESS
**
** HISTORY OUTPUT: H-Output-4
**
*Output, history
*Contact Output
CAREA, CFT1, CFT2, CFT3, CFTM
**
** HISTORY OUTPUT: H-Output-3
**
*Contact Output, nset=layer-1."contact surface"
CAREA, CFT1, CFT2, CFT3, CFTM
**
** HISTORY OUTPUT: H-Output-1
**
*Contact Output, nset=plate-1.contact_surface
CAREA, CFT1, CFT2, CFT3, CFTM
**
** HISTORY OUTPUT: H-Output-2
**
*Node Output, nset=plate-1.one_node
U2,
*End Step
** ----------------------------------------------------------------
**
** STEP: step2000
**
*Step, name=step2000, nlgeom=YES, inc=10
*Static
0.01, 0.1, 1e-06, 0.01
**
** BOUNDARY CONDITIONS
**
** Name: fix all nodes Type: Symmetry/Antisymmetry/Encastre
*Boundary, op=NEW
plate-1.all_nodes, XSYMM
** Name: fix inner layer Type: Symmetry/Antisymmetry/Encastre
*Boundary, op=NEW
Set-10, ENCASTRE
** Name: step1750 Type: Displacement/Rotation
*Boundary, op=NEW
** Name: step2000 Type: Displacement/Rotation
*Boundary, op=NEW
Set-7, 1, 1
Set-7, 2, 2, 0.000423
Set-7, 3, 3
Set-7, 4, 4
Set-7, 5, 5
Set-7, 6, 6
**
** OUTPUT REQUESTS
**
*Restart, write, frequency=0
**
** FIELD OUTPUT: F-Output-1
**
*Output, field
*Node Output
CF, RF, U
*Element Output, directions=YES
LE, PE, PEEQ, PEMAG, S
*Contact Output
CDISP, CFORCE, CSTRESS
**
** HISTORY OUTPUT: H-Output-4
**
*Output, history
*Contact Output
CAREA, CFT1, CFT2, CFT3, CFTM
**
** HISTORY OUTPUT: H-Output-3
**
*Contact Output, nset=layer-1."contact surface"
CAREA, CFT1, CFT2, CFT3, CFTM
**
** HISTORY OUTPUT: H-Output-1
**
*Contact Output, nset=plate-1.contact_surface
CAREA, CFT1, CFT2, CFT3, CFTM
**
** HISTORY OUTPUT: H-Output-2
**
*Node Output, nset=plate-1.one_node
U2,
*End Step
** ----------------------------------------------------------------
**
** STEP: step3000
**
*Step, name=step3000, nlgeom=YES, inc=10
*Static
0.01, 0.1, 1e-06, 0.01
**
** BOUNDARY CONDITIONS
**
** Name: fix all nodes Type: Symmetry/Antisymmetry/Encastre
*Boundary, op=NEW
plate-1.all_nodes, XSYMM
** Name: fix inner layer Type: Symmetry/Antisymmetry/Encastre
*Boundary, op=NEW
Set-10, ENCASTRE
** Name: step2000 Type: Displacement/Rotation
*Boundary, op=NEW
** Name: step3000 Type: Displacement/Rotation
*Boundary, op=NEW
Set-8, 1, 1
Set-8, 2, 2, 0.000513
Set-8, 3, 3
Set-8, 4, 4
Set-8, 5, 5
Set-8, 6, 6
**
** OUTPUT REQUESTS
**
*Restart, write, frequency=0
**
** FIELD OUTPUT: F-Output-1
**
*Output, field
*Node Output
CF, RF, U
*Element Output, directions=YES
LE, PE, PEEQ, PEMAG, S
*Contact Output
CDISP, CFORCE, CSTRESS
**
** HISTORY OUTPUT: H-Output-4
**
*Output, history
*Contact Output
CAREA, CFT1, CFT2, CFT3, CFTM
**
** HISTORY OUTPUT: H-Output-3
**
*Contact Output, nset=layer-1."contact surface"
CAREA, CFT1, CFT2, CFT3, CFTM
**
** HISTORY OUTPUT: H-Output-1
**
*Contact Output, nset=plate-1.contact_surface
CAREA, CFT1, CFT2, CFT3, CFTM
**
** HISTORY OUTPUT: H-Output-2
**
*Node Output, nset=plate-1.one_node
U2,
*End Step
** ----------------------------------------------------------------
**
** STEP: step4000
**
*Step, name=step4000, nlgeom=YES, inc=10
*Static
0.01, 0.1, 1e-06, 0.01
**
** BOUNDARY CONDITIONS
**
** Name: fix all nodes Type: Symmetry/Antisymmetry/Encastre
*Boundary, op=NEW
plate-1.all_nodes, XSYMM
** Name: fix inner layer Type: Symmetry/Antisymmetry/Encastre
*Boundary, op=NEW
Set-10, ENCASTRE
** Name: step3000 Type: Displacement/Rotation
*Boundary, op=NEW
** Name: step4000 Type: Displacement/Rotation
*Boundary, op=NEW
Set-9, 1, 1
Set-9, 2, 2, 0.000637
Set-9, 3, 3
Set-9, 4, 4
Set-9, 5, 5
Set-9, 6, 6
**
** OUTPUT REQUESTS
**
*Restart, write, frequency=0
**
** FIELD OUTPUT: F-Output-1
**
*Output, field
*Node Output
CF, RF, U
*Element Output, directions=YES
LE, PE, PEEQ, PEMAG, S
*Contact Output
CDISP, CFORCE, CSTRESS
**
** HISTORY OUTPUT: H-Output-4
**
*Output, history
*Contact Output
CAREA, CFT1, CFT2, CFT3, CFTM
**
** HISTORY OUTPUT: H-Output-3
**
*Contact Output, nset=layer-1."contact surface"
CAREA, CFT1, CFT2, CFT3, CFTM
**
** HISTORY OUTPUT: H-Output-1
**
*Contact Output, nset=plate-1.contact_surface
CAREA, CFT1, CFT2, CFT3, CFTM
**
** HISTORY OUTPUT: H-Output-2
**
*Node Output, nset=plate-1.one_node
U2,
*End Step
