*Heading
** Job name: standard_NH1 Model name: Model-1
** Generated by: Abaqus/CAE 2022
*Preprint, echo=NO, model=NO, history=NO, contact=NO
**
*PARAMETER
C10=
C01=
** PARTS
**
*Part, name="layer 1/6"
*Node
      1, 0.0233238079, -0.0659999996
      2,           0., -0.0659999996
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*Element, type=CPS3
  1, 10285,  9403,  2565
  2, 11523,  3536,  3537
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*Element, type=CPS4R
  599,    10,    11,  1027,  1028
  600,  1024,  1025,    13,    14
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*Nset, nset=Set-1, generate
     1,  51056,      1
*Elset, elset=Set-1, generate
     1,  51397,      1
** Section: elastomer
*Solid Section, elset=Set-1, material=elastomer
,
*End Part
**
*Part, name=plate
*Node
      1, 0.0399999991, 0.00625000009
      2, 0.0399999991, 0.0162499994
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*Element, type=CPS4R
  1,   1,   7, 190, 102
  2,   7,   8, 191, 190
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*Nset, nset=Set-1, generate
   1,  891,    1
*Elset, elset=Set-1, generate
   1,  800,    1
*Nset, nset=all_nodes, generate
   1,  891,    1
*Nset, nset=under_node
 1,
*Nset, nset=one_node
 2,
*Elset, elset="_top surrface_S2", internal, generate
  10,  400,   10
*Elset, elset="_top surrface_S4", internal, generate
 401,  791,   10
*Surface, type=ELEMENT, name="top surrface"
"_top surrface_S2", S2
"_top surrface_S4", S4
*Elset, elset="_bottom surface_S4", internal, generate
   1,  391,   10
*Elset, elset="_bottom surface_S2", internal, generate
 410,  800,   10
*Surface, type=ELEMENT, name="bottom surface"
"_bottom surface_S4", S4
"_bottom surface_S2", S2
** Section: steel
*Solid Section, elset=Set-1, material=steel
,
*End Part
**
**
** ASSEMBLY
**
*Assembly, name=Assembly
**
*Instance, name=plate-1, part=plate
*End Instance
**
*Instance, name="layer 1/6-1", part="layer 1/6"
        0.04,      0.08625,           0.
*End Instance
**
*Node
      1, 0.0399999991, 0.00625000009,           0.
*Node
      2,           0., 0.0162499994,           0.
*Nset, nset=Set-2, instance=plate-1
   1,   2,   3,   4,   5,   6
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*Elset, elset=Set-2, instance=plate-1
   1,  10,  11,  20,  21,  30
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*Nset, nset=Set-3, instance=plate-1
   2,   3,   6,  16,  17,  18
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*Elset, elset=Set-3, instance=plate-1
  10,  20,  30,  40,  50,  60
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*Nset, nset=Set-4, instance=plate-1
   2,   3,   6,  16,  17,  18
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*Elset, elset=Set-4, instance=plate-1
  10,  20,  30,  40,  50,  60
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*Nset, nset=Set-5, instance=plate-1
 1,
*Nset, nset=Set-6, instance=plate-1
 1,
*Nset, nset=Set-14, instance=plate-1
   2,   3,   6,  16,  17,  18
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*Elset, elset=Set-14, instance=plate-1
  10,  20,  30,  40,  50,  60
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*Nset, nset=Set-15, instance=plate-1
   2,   3,   6,  16,  17,  18
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*Elset, elset=Set-15, instance=plate-1
  10,  20,  30,  40,  50,  60
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*Nset, nset=Set-16, instance=plate-1
   2,   3,   6,  16,  17,  18
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*Elset, elset=Set-16, instance=plate-1
  10,  20,  30,  40,  50,  60
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*Nset, nset=Set-32, instance=plate-1
   2,   3,   6,  16,  17,  18
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*Elset, elset=Set-32, instance=plate-1
  10,  20,  30,  40,  50,  60
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*Nset, nset=Set-33, instance="layer 1/6-1"
    5,    6,    9, 1977, 1978, 1979
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*Elset, elset=_m_Surf-1_S2, internal, instance=plate-1, generate
  10,  400,   10
*Elset, elset=_m_Surf-1_S4, internal, instance=plate-1, generate
 401,  791,   10
*Surface, type=ELEMENT, name=m_Surf-1
_m_Surf-1_S2, S2
_m_Surf-1_S4, S4
*Elset, elset=_m_Surf-4_S2, internal, instance=plate-1, generate
  10,  400,   10
*Elset, elset=_m_Surf-4_S4, internal, instance=plate-1, generate
 401,  791,   10
*Surface, type=ELEMENT, name=m_Surf-4
_m_Surf-4_S2, S2
_m_Surf-4_S4, S4
*Elset, elset=_m_Surf-10_S2, internal, instance=plate-1, generate
  10,  400,   10
*Elset, elset=_m_Surf-10_S4, internal, instance=plate-1, generate
 401,  791,   10
*Surface, type=ELEMENT, name=m_Surf-10
_m_Surf-10_S2, S2
_m_Surf-10_S4, S4
*Elset, elset=_m_Surf-12_S3, internal, instance=plate-1, generate
 391,  400,    1
*Surface, type=ELEMENT, name=m_Surf-12
_m_Surf-12_S3, S3
*Elset, elset=_m_Surf-14_S1, internal, instance="layer 1/6-1"
    62,   600,   671,   928,   952,  1032
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*Elset, elset=_m_Surf-14_S3, internal, instance="layer 1/6-1"
   599,   601,   843,  1005,  1056,  1063
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*Elset, elset=_m_Surf-14_S4, internal, instance="layer 1/6-1"
   679,   857,   899,   901,   918,   947
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*Elset, elset=_m_Surf-14_S2, internal, instance="layer 1/6-1"
   854,   858,   897,   971,   974,  1265
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*Surface, type=ELEMENT, name=m_Surf-14
_m_Surf-14_S1, S1
_m_Surf-14_S3, S3
_m_Surf-14_S4, S4
_m_Surf-14_S2, S2
*Elset, elset=_s_Surf-3_S2, internal, instance=plate-1, generate
  10,  400,   10
*Elset, elset=_s_Surf-3_S4, internal, instance=plate-1, generate
 401,  791,   10
*Surface, type=ELEMENT, name=s_Surf-3
_s_Surf-3_S2, S2
_s_Surf-3_S4, S4
*Elset, elset=_s_Surf-4_S2, internal, instance=plate-1, generate
 410,  800,   10
*Elset, elset=_s_Surf-4_S4, internal, instance=plate-1, generate
   1,  391,   10
*Surface, type=ELEMENT, name=s_Surf-4
_s_Surf-4_S2, S2
_s_Surf-4_S4, S4
*Elset, elset=_s_Surf-8_S2, internal, instance=plate-1, generate
  10,  400,   10
*Elset, elset=_s_Surf-8_S4, internal, instance=plate-1, generate
 401,  791,   10
*Surface, type=ELEMENT, name=s_Surf-8
_s_Surf-8_S2, S2
_s_Surf-8_S4, S4
*Elset, elset=_s_Surf-10_S3, internal, instance=plate-1
 391, 392, 393, 394, 395, 396
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*Surface, type=ELEMENT, name=s_Surf-10
_s_Surf-10_S3, S3
*Elset, elset=_s_Surf-12_S3, internal, instance=plate-1, generate
 791,  800,    1
*Surface, type=ELEMENT, name=s_Surf-12
_s_Surf-12_S3, S3
*Elset, elset=_s_Surf-14_S2, internal, instance=plate-1, generate
  10,  400,   10
*Elset, elset=_s_Surf-14_S4, internal, instance=plate-1, generate
 401,  791,   10
*Surface, type=ELEMENT, name=s_Surf-14
_s_Surf-14_S2, S2
_s_Surf-14_S4, S4
** Constraint: Top-Bottom
*Tie, name=Top-Bottom, adjust=yes
plate-1."top surrface", plate-1."bottom surface"
*Elset, elset="__general contact_gcs0_10_S1", internal, instance="layer 1/6-1"
    62,   600,   671,   928,   952,  1032
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*Elset, elset="__general contact_gcs0_10_S3", internal, instance="layer 1/6-1"
   599,   601,   843,  1005,  1056,  1063
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*Elset, elset="__general contact_gcs0_10_S4", internal, instance="layer 1/6-1"
   679,   857,   899,   901,   918,   947
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*Elset, elset="__general contact_gcs0_10_S2", internal, instance="layer 1/6-1"
   854,   858,   897,   971,   974,  1265
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*Surface, type=ELEMENT, name="_general contact_gcs0_10", internal
"__general contact_gcs0_10_S1", S1
"__general contact_gcs0_10_S3", S3
"__general contact_gcs0_10_S4", S4
"__general contact_gcs0_10_S2", S2
*Elset, elset="__general contact_gcs0_12_S2", internal, instance="layer 1/6-1"
 17193, 17895, 17897, 17898, 17900, 17903
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*Elset, elset="__general contact_gcs0_12_S4", internal, instance="layer 1/6-1"
 17751, 17754, 17896, 17981, 18133, 18135
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*Elset, elset="__general contact_gcs0_12_S1", internal, instance="layer 1/6-1"
 17752, 18132, 18153, 18212, 18217, 18227
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*Elset, elset="__general contact_gcs0_12_S3", internal, instance="layer 1/6-1"
 18033, 18219, 18250, 18255, 18262, 18269
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*Surface, type=ELEMENT, name="_general contact_gcs0_12", internal
"__general contact_gcs0_12_S2", S2
"__general contact_gcs0_12_S4", S4
"__general contact_gcs0_12_S1", S1
"__general contact_gcs0_12_S3", S3
*Elset, elset="__general contact_gcs0_14_S1", internal, instance="layer 1/6-1"
 34596, 34597, 34610, 34629, 34642, 34660
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*Elset, elset="__general contact_gcs0_14_S3", internal, instance="layer 1/6-1"
 34598, 34641, 34643, 34644, 34659, 34712, 34714, 34759, 41279, 41283
*Elset, elset="__general contact_gcs0_14_S4", internal, instance="layer 1/6-1"
 34646, 34835
*Elset, elset="__general contact_gcs0_14_S2", internal, instance="layer 1/6-1"
 34657, 34834
*Surface, type=ELEMENT, name="_general contact_gcs0_14", internal
"__general contact_gcs0_14_S1", S1
"__general contact_gcs0_14_S3", S3
"__general contact_gcs0_14_S4", S4
"__general contact_gcs0_14_S2", S2
*Elset, elset="__general contact_gcs0_16_S3", internal, instance="layer 1/6-1"
 34310, 34674, 34675
*Elset, elset="__general contact_gcs0_16_S1", internal, instance="layer 1/6-1"
 34664,
*Elset, elset="__general contact_gcs0_16_S4", internal, instance="layer 1/6-1"
 34673, 34691, 34719, 34720, 34721, 34728, 35123
*Elset, elset="__general contact_gcs0_16_S2", internal, instance="layer 1/6-1"
 34724, 34726, 34727, 34750, 41518
*Surface, type=ELEMENT, name="_general contact_gcs0_16", internal
"__general contact_gcs0_16_S3", S3
"__general contact_gcs0_16_S1", S1
"__general contact_gcs0_16_S4", S4
"__general contact_gcs0_16_S2", S2
*Elset, elset="__general contact_gcs0_17_S3", internal, instance="layer 1/6-1"
 43376, 43392, 43395, 43410, 49769
*Elset, elset="__general contact_gcs0_17_S2", internal, instance="layer 1/6-1"
 43393, 43835
*Elset, elset="__general contact_gcs0_17_S4", internal, instance="layer 1/6-1"
 43394, 43598, 43599
*Elset, elset="__general contact_gcs0_17_S1", internal, instance="layer 1/6-1"
 43409, 43419, 43509, 43601, 43602, 49756
*Surface, type=ELEMENT, name="_general contact_gcs0_17", internal
"__general contact_gcs0_17_S3", S3
"__general contact_gcs0_17_S2", S2
"__general contact_gcs0_17_S4", S4
"__general contact_gcs0_17_S1", S1
*Elset, elset="__general contact_gcs0_19_S4", internal, instance="layer 1/6-1"
 43384, 43385, 43446, 43448, 43469, 43503, 43606, 49734
*Elset, elset="__general contact_gcs0_19_S2", internal, instance="layer 1/6-1"
 43412, 43420, 43431, 43440, 43447, 43459, 43555, 43605, 43607, 43608, 49739, 49765
*Elset, elset="__general contact_gcs0_19_S3", internal, instance="layer 1/6-1"
 43432, 43450, 43457, 43467, 43472, 43539, 43549, 49752
*Elset, elset="__general contact_gcs0_19_S1", internal, instance="layer 1/6-1"
 43466, 43547, 49764
*Surface, type=ELEMENT, name="_general contact_gcs0_19", internal
"__general contact_gcs0_19_S4", S4
"__general contact_gcs0_19_S2", S2
"__general contact_gcs0_19_S3", S3
"__general contact_gcs0_19_S1", S1
*End Assembly
**
** MATERIALS
**
*Material, name=elastomer
*Density
1175.,
*Hyperelastic, mooney-rivlin
<C10>,<C01>,0.
*Material, name=steel
*Density
7850.,
*Elastic
 2.1e+11, 0.3
**
** INTERACTION PROPERTIES
**
*Surface Interaction, name=frict
1.,
*Friction, slip tolerance=0.005
 1.045,
**
** BOUNDARY CONDITIONS
**
** Name: fix_all_nodes Type: Symmetry/Antisymmetry/Encastre
*Boundary
plate-1.all_nodes, XSYMM
** Name: fix_all_sides Type: Symmetry/Antisymmetry/Encastre
*Boundary
Set-2, XSYMM
** Name: fix_inner_layer Type: Symmetry/Antisymmetry/Encastre
*Boundary
Set-33, ENCASTRE
**
** INTERACTIONS
**
** Interaction: general contact
*Contact
*Contact Inclusions, ALL EXTERIOR
*Contact Property Assignment
 ,  , frict
*Surface Property Assignment, property=GEOMETRIC CORRECTION
"_general contact_gcs0_10", Circumferential, 0.04, 0.08625
"_general contact_gcs0_12", Circumferential, 0.04, 0.08625
"_general contact_gcs0_14", Circumferential, 0.04, 0.08625
"_general contact_gcs0_16", Circumferential, 0.04, 0.08625
"_general contact_gcs0_17", Circumferential, 0.04, 0.08625
"_general contact_gcs0_19", Circumferential, 0.04, 0.08625
** ----------------------------------------------------------------
**
** STEP: press
**
*Step, name=press, nlgeom=YES
*Static
0.01, 1., 1e-05, 0.01
**
** BOUNDARY CONDITIONS
**
** Name: press Type: Displacement/Rotation
*Boundary
Set-32, 1, 1
Set-32, 2, 2, 0.003
Set-32, 6, 6
**
** OUTPUT REQUESTS
**
*Restart, write, frequency=0
**
** FIELD OUTPUT: F-Output-1
**
*Output, field, variable=PRESELECT
**
** HISTORY OUTPUT: H-Output-3
**
*Output, history
*Contact Output
CAREA, CFT2
**
** HISTORY OUTPUT: H-Output-1
**
*Node Output, nset=plate-1.one_node
U2,
**
** HISTORY OUTPUT: H-Output-2
**
*Node Output, nset=plate-1.under_node
CF2, RF2, U2
*End Step
