*Heading
** Job name: press2 Model name: Model-1
** Generated by: Abaqus/CAE 2022
*Preprint, echo=NO, model=NO, history=NO, contact=NO
**
*PARAMETER
C10= 2e6
D1 = 1e-6
h =

** PARTS
**
*Part, name=layer
*Node
      1,           0., -0.0700000003
      2,           0., -0.0599999987
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*Element, type=CPS4R
  1,   1,   7, 212, 112
  2,   7,   8, 213, 212
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*Nset, nset=Set-1, generate
   1,  855,    1
*Elset, elset=Set-1, generate
   1,  752,    1
** Section: elastomer
*Solid Section, elset=Set-1, material=elastomer
,
*End Part
**
*Part, name=plate
*Node
      1, 0.0399999991, 0.00625000009
      2, 0.0399999991, 0.0162499994
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*Element, type=CPS4R
  1,   1,   7, 190, 102
  2,   7,   8, 191, 190
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*Nset, nset=Set-1, generate
   1,  891,    1
*Elset, elset=Set-1, generate
   1,  800,    1
*Nset, nset=all_nodes, generate
   1,  891,    1
*Nset, nset=one_node
 2,
** Section: steel
*Solid Section, elset=Set-1, material=steel
,
*End Part
**
**
** ASSEMBLY
**
*Assembly, name=Assembly
**
*Instance, name=plate-1, part=plate
*End Instance
**
*Instance, name=layer-1, part=layer
        0.04,      0.08625,           0.
*End Instance
**
*Nset, nset=Set-1, instance=layer-1
   2,   3,   6,  14,  15,  16
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*Elset, elset=Set-1, instance=layer-1
   8,  16,  24,  32,  40,  48
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*Nset, nset=Set-2, instance=plate-1
   1,   2,   3,   4,   5,   6
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*Elset, elset=Set-2, instance=plate-1
   1,  10,  11,  20,  21,  30
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*Nset, nset=Set-3, instance=plate-1
   2,   3,   6,  16,  17,  18
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*Elset, elset=Set-3, instance=plate-1
  10,  20,  30,  40,  50,  60
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*Nset, nset=Set-4, instance=plate-1
   2,   3,   6,  16,  17,  18
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*Elset, elset=Set-4, instance=plate-1
  10,  20,  30,  40,  50,  60
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*Elset, elset=_m_Surf-1_S2, internal, instance=plate-1, generate
  10,  400,   10
*Elset, elset=_m_Surf-1_S4, internal, instance=plate-1, generate
 401,  791,   10
*Surface, type=ELEMENT, name=m_Surf-1
_m_Surf-1_S2, S2
_m_Surf-1_S4, S4
*Elset, elset=_s_Surf-1_S4, internal, instance=layer-1, generate
   1,  369,    8
*Elset, elset=_s_Surf-1_S2, internal, instance=layer-1, generate
 384,  752,    8
*Surface, type=ELEMENT, name=s_Surf-1
_s_Surf-1_S4, S4
_s_Surf-1_S2, S2
*End Assembly
**
** MATERIALS
**
*Material, name=elastomer
*Density
1175.,
*Hyperelastic, neo hooke
<C10>, <D1>
*Material, name=steel
*Density
7850.,
*Elastic
 2.1e+11, 0.3
**
** INTERACTION PROPERTIES
**
*Surface Interaction, name=frict
1.,
*Friction, slip tolerance=0.005
 0.3,
**
** BOUNDARY CONDITIONS
**
** Name: fix_all_nodes Type: Symmetry/Antisymmetry/Encastre
*Boundary
plate-1.all_nodes, XSYMM
** Name: fix_all_sides Type: Symmetry/Antisymmetry/Encastre
*Boundary
Set-2, XSYMM
** Name: fix_inner_layer Type: Symmetry/Antisymmetry/Encastre
*Boundary
Set-1, ENCASTRE
**
** INTERACTIONS
**
** Interaction: frict_int
*Contact Pair, interaction=frict, type=SURFACE TO SURFACE
s_Surf-1, m_Surf-1
** ----------------------------------------------------------------
**
** STEP: contact
**
*Step, name=contact, nlgeom=YES
*Static
0.01, 1., 1e-05, 0.01
**
** BOUNDARY CONDITIONS
**
** Name: contact Type: Displacement/Rotation
*Boundary
Set-3, 1, 1
Set-3, 2, 2, 5.86e-05
Set-3, 6, 6
**
** OUTPUT REQUESTS
**
*Restart, write, frequency=0
**
** FIELD OUTPUT: F-Output-1
**
*Output, field, variable=PRESELECT
**
** HISTORY OUTPUT: H-Output-1
**
*Output, history
*Node Output, nset=plate-1.one_node
RF2, U2
*End Step
** ----------------------------------------------------------------
**
** STEP: press
**
*Step, name=press, nlgeom=YES
*Static
0.01, 1., 1e-05, 0.01
**
** BOUNDARY CONDITIONS
**
** Name: contact Type: Displacement/Rotation
*Boundary, op=NEW
** Name: fix_all_nodes Type: Symmetry/Antisymmetry/Encastre
*Boundary, op=NEW
plate-1.all_nodes, XSYMM
** Name: fix_all_sides Type: Symmetry/Antisymmetry/Encastre
*Boundary, op=NEW
Set-2, XSYMM
** Name: fix_inner_layer Type: Symmetry/Antisymmetry/Encastre
*Boundary, op=NEW
Set-1, ENCASTRE
** Name: press Type: Displacement/Rotation
*Boundary, op=NEW
Set-4, 1, 1
Set-4, 2, 2, <h>
Set-4, 6, 6
**
** OUTPUT REQUESTS
**
*Restart, write, frequency=0
**
** FIELD OUTPUT: F-Output-1
**
*Output, field
*Node Output
RF, U
**
** HISTORY OUTPUT: H-Output-1
**
*Output, history
*Node Output, nset=plate-1.one_node
RF2, U2
*End Step
